/CLEAR,NOSTART
/FILNAME,finite_builder_syntax_smoke,1
/PREP7
ET,1,MASS21
KEYOPT,1,3,0
R,1,1E-12,1E-12,1E-12
TYPE,1
REAL,1
N,16,89909.000000000000,24120.000000000000,72528.161247186901
E,16
N,29,146909.000000000000,24120.000000000000,91873.649977522393
E,29
N,42,203909.000000000000,24120.000000000000,112301.044092026001
E,42
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N,81,374909.000000000000,24120.000000000000,181248.472216419992
E,81
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/INPUT,apply_finite_gates_and_passages_v2,inp
/PREP7
ALLSEL,ALL
*GET,_SMK_N,NODE,0,COUNT
*GET,_SMK_E,ELEM,0,COUNT
*CFOPEN,syntax_smoke_counts,txt
*VWRITE,_SMK_N,_SMK_E
('NODES=',F16.0,',ELEMENTS=',F16.0)
*CFCLOS
FINISH
/EXIT,NOSAVE
