** Open the unverified smoke-deck heading.
*HEADING
** Write the stable deck identity.
CW-CCX-ZF-SMK-20260829-01 ZERO-STRESS INVERSE FORM-FINDING SMOKE
** PRESTRESS_POLICY=ZERO_IMPORTED_PRESTRESS
** Begin nodes for the current zero-stress reference geometry guess.
*NODE, NSET=ALL_NODES
** Define reference node 1001.
1001, 666.679000000, 21.450000000, 340.600000000
** Define reference node 1002.
1002, 809.594125000, 21.450000000, 290.630186000
** Define reference node 1003.
1003, 952.509250000, 21.450000000, 247.323013000
** Define reference node 1004.
1004, 1095.424375000, 21.450000000, 210.678483000
** Define reference node 1005.
1005, 1238.339500000, 21.450000000, 180.696594000
** Define reference node 1006.
1006, 1381.254625000, 21.450000000, 157.377347000
** Define reference node 1007.
1007, 1524.169750000, 21.450000000, 140.720743000
** Define reference node 1008.
1008, 1667.084875000, 21.450000000, 130.726780000
** Define reference node 1009.
1009, 1810.000000000, 21.450000000, 127.395459000
** Define reference node 1010.
1010, 1952.915125000, 21.450000000, 130.726780000
** Define reference node 1011.
1011, 2095.830250000, 21.450000000, 140.720743000
** Define reference node 1012.
1012, 2238.745375000, 21.450000000, 157.377347000
** Define reference node 1013.
1013, 2381.660500000, 21.450000000, 180.696594000
** Define reference node 1014.
1014, 2524.575625000, 21.450000000, 210.678483000
** Define reference node 1015.
1015, 2667.490750000, 21.450000000, 247.323013000
** Define reference node 1016.
1016, 2810.405875000, 21.450000000, 290.630186000
** Define reference node 1017.
1017, 2953.321000000, 21.450000000, 340.600000000
** Define reference node 2001.
2001, 666.679000000, -21.450000000, 340.600000000
** Define reference node 2002.
2002, 809.594125000, -21.450000000, 290.630186000
** Define reference node 2003.
2003, 952.509250000, -21.450000000, 247.323013000
** Define reference node 2004.
2004, 1095.424375000, -21.450000000, 210.678483000
** Define reference node 2005.
2005, 1238.339500000, -21.450000000, 180.696594000
** Define reference node 2006.
2006, 1381.254625000, -21.450000000, 157.377347000
** Define reference node 2007.
2007, 1524.169750000, -21.450000000, 140.720743000
** Define reference node 2008.
2008, 1667.084875000, -21.450000000, 130.726780000
** Define reference node 2009.
2009, 1810.000000000, -21.450000000, 127.395459000
** Define reference node 2010.
2010, 1952.915125000, -21.450000000, 130.726780000
** Define reference node 2011.
2011, 2095.830250000, -21.450000000, 140.720743000
** Define reference node 2012.
2012, 2238.745375000, -21.450000000, 157.377347000
** Define reference node 2013.
2013, 2381.660500000, -21.450000000, 180.696594000
** Define reference node 2014.
2014, 2524.575625000, -21.450000000, 210.678483000
** Define reference node 2015.
2015, 2667.490750000, -21.450000000, 247.323013000
** Define reference node 2016.
2016, 2810.405875000, -21.450000000, 290.630186000
** Define reference node 2017.
2017, 2953.321000000, -21.450000000, 340.600000000
** Begin positive-y equivalent floor-rope elements.
*ELEMENT, TYPE=T3D2, ELSET=DECK_P
** Connect positive-y nodes 1001 and 1002.
11001, 1001, 1002
** Connect positive-y nodes 1002 and 1003.
11002, 1002, 1003
** Connect positive-y nodes 1003 and 1004.
11003, 1003, 1004
** Connect positive-y nodes 1004 and 1005.
11004, 1004, 1005
** Connect positive-y nodes 1005 and 1006.
11005, 1005, 1006
** Connect positive-y nodes 1006 and 1007.
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** Begin negative-y equivalent floor-rope elements.
*ELEMENT, TYPE=T3D2, ELSET=DECK_M
** Connect negative-y nodes 2001 and 2002.
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** Begin axial ties used only to smoke-test two-deck connectivity.
*ELEMENT, TYPE=T3D2, ELSET=SMOKE_TIES
** Connect both deck lines at smoke station 0; this is not a production portal or passage.
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** Define the equivalent floor-rope material.
*MATERIAL, NAME=MAT_FLOOR_EQ
** Define cable-group elasticity.
*ELASTIC
** Write rope-group elastic modulus and Poisson ratio.
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** Define smoke-only effective density that reproduces the registered line load.
*DENSITY
** Write effective density without adding any second self-weight source.
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** Assign the total area of sixteen floor ropes to the positive-y equivalent line.
*SOLID SECTION, ELSET=DECK_P, MATERIAL=MAT_FLOOR_EQ
** Write the equivalent positive-y cable area.
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** Assign the same total area to the negative-y equivalent line.
*SOLID SECTION, ELSET=DECK_M, MATERIAL=MAT_FLOOR_EQ
** Write the equivalent negative-y cable area.
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** Define a massless smoke-tie material.
*MATERIAL, NAME=MAT_TIE_SMOKE
** Define smoke-tie elasticity.
*ELASTIC
** Write smoke-tie elastic constants.
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** Assign the smoke-only axial area to transverse ties.
*SOLID SECTION, ELSET=SMOKE_TIES, MATERIAL=MAT_TIE_SMOKE
** Write the smoke-tie area.
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** Start displacement-controlled erection with geometric nonlinearity.
*STEP, NAME=ZF_S1_ERECTION, NLGEOM
** Select static continuation for erection.
*STATIC
** Write erection increment controls.
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** Open the physical support block.
*BOUNDARY
** Fix all translations at physical support node 1001.
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** Open temporary internal controls that regularize the erection path only.
*BOUNDARY
** Hold temporary erection node 1002 in the longitudinal direction.
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** Request erection displacement and reaction fields.
*NODE FILE
** Write erection displacement and reaction fields.
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** Request erection stress and strain fields.
*EL FILE
** Write erection stress and strain fields.
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** End the erection step.
*END STEP
** Start dead-load release with geometric nonlinearity.
*STEP, NAME=ZF_S2_DEADLOAD_RELEASE, NLGEOM
** Select static continuation for release.
*STATIC
** Write conservative release increment controls.
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** Open the physical support block.
*BOUNDARY, OP=NEW
** Fix all translations at physical support node 1001.
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** Replace prior distributed loads with the registered gravity field.
*DLOAD, OP=NEW
** Apply downward gravity to the positive-y cable line.
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** Apply downward gravity to the negative-y cable line.
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** Request loaded coordinates, displacements, and reactions for the inverse update.
*NODE FILE
** Write loaded coordinates, displacements, and reactions.
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** Request released cable stress and strain.
*EL FILE
** Write released cable stress and strain.
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** End the dead-load release step.
*END STEP
** Start a no-added-load equilibrium hold step.
*STEP, NAME=ZF_S3_HOLD, NLGEOM
** Select a bounded static hold interval.
*STATIC
** Write hold increment controls.
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** Reapply exactly the same gravity and add no new physical action.
*DLOAD, OP=NEW
** Repeat downward gravity on the positive-y cable line.
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** Repeat downward gravity on the negative-y cable line.
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** Request hold coordinates, displacements, and reactions.
*NODE FILE
** Write hold coordinates, displacements, and reactions.
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** Request hold cable stress and strain.
*EL FILE
** Write hold cable stress and strain.
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** End the no-added-load hold step.
*END STEP
