*HEADING
Zhangjinggao catwalk centerline FEM
** coordinate: x = chainage - K16+876.000, y upstream->downstream, z up
** units: m, N, kg, s
** geometry: STEP cw_S10_0716t050342_a4_centerline.step (Release catwalk-attachment23-v2.0-s10-20260716)
** properties: drawings / check report; NOT S10.db, NOT B00, NOT MCT, NOT TARGET-FREQ
** write_inp: complete deck (nodes, elsets, materials, BC, initial stress, load cases)
** anchors: floor-rope and portal-rope families are DISJOINT NSETs; do not mix
** topology audit: 21 cross-passages, 71 portals/deck = 142 both decks
** nodes=51896 elements=30317

*NODE
1, 0.000000, -23.660000, 44.310000
2, 0.000000, -23.400000, 44.310000
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*NSET, NSET=N_SUP_X0
1, 2, 3, 4, 5, 6, 7, 8, 9, 10
11, 12
*NSET, NSET=N_SUP_NT_SADDLE
9522, 9523, 9524, 9525, 9526, 9527
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*NSET, NSET=N_SUP_ST_SADDLE
32972, 32973, 32974, 32975, 32976, 32977
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*NSET, NSET=N_SUP_AUX
42955, 42956, 42957, 42958, 42959, 42960
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*NSET, NSET=N_SUP_X4180
50903, 50904, 50905, 50906, 50907, 50908
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*NSET, NSET=N_SUPPORT_SADDLE_ENDS
1, 2, 3, 4, 5, 6
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*NSET, NSET=N_FLOOR_ANCHOR
1, 2, 3, 4, 5, 6
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*NSET, NSET=N_PORTAL_ANCHOR
77, 78, 79, 80, 81, 82, 83, 84, 85, 86
87, 88, 51711, 51712, 51713, 51714
** floor/portal NSET overlap count = 0 (must be 0)
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*ELEMENT, TYPE=T3D2, ELSET=E_TRUSS
1, 44, 76
2, 144, 188
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*ELEMENT, TYPE=B31, ELSET=E_BEAM
25300, 80, 79
25301, 84, 83
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*ELSET, ELSET=E_FLOOR_ROPE
1, 2, 3, 4, 5, 6
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*ELSET, ELSET=E_PORTAL_ROPE
30019, 30020, 30021, 30022, 30023, 30024
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*ELSET, ELSET=E_LONGITUDINAL_OTHER
30246, 30247, 30248, 30249, 30250, 30251
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*ELSET, ELSET=E_HANDRAIL_ROPE
30263, 30264, 30265, 30266, 30267, 30268
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*ELSET, ELSET=E_PORTAL_OR_BEAM
25300, 25301, 25302, 25303, 25304, 25305
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*ELSET, ELSET=E_CROSS_PASSAGE
30297, 30298, 30299, 30300, 30301, 30302
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*MATERIAL, NAME=MAT-ROPE-FLOOR
*ELASTIC
1.200000e+11, 0.3
*DENSITY
8595.992631
*MATERIAL, NAME=MAT-ROPE-PORTAL
*ELASTIC
1.200000e+11, 0.3
*DENSITY
8595.992631
*MATERIAL, NAME=MAT-ROPE-HAND-U
*ELASTIC
1.200000e+11, 0.3
*DENSITY
5324.813528
*MATERIAL, NAME=MAT-ROPE-HAND-L
*ELASTIC
1.200000e+11, 0.3
*DENSITY
5315.775099
*MATERIAL, NAME=MAT-STEEL
*ELASTIC
2.060000e+11, 0.3
*DENSITY
7850.000000
*SOLID SECTION, ELSET=E_FLOOR_ROPE, MATERIAL=MAT-ROPE-FLOOR
1.40042000e-03
*SOLID SECTION, ELSET=E_PORTAL_ROPE, MATERIAL=MAT-ROPE-PORTAL
1.40042000e-03
*SOLID SECTION, ELSET=E_LONGITUDINAL_OTHER, MATERIAL=MAT-ROPE-HAND-L
3.14159265e-04
*SOLID SECTION, ELSET=E_HANDRAIL_ROPE, MATERIAL=MAT-ROPE-HAND-U
1.01787602e-03
*BEAM SECTION, ELSET=E_BEAM, MATERIAL=MAT-STEEL, SECTION=RECT
0.160, 0.160
0.0, 0.0, 1.0
** BOUNDARY: UX,UY,UZ. Floor-rope anchors and portal-rope anchors are separate cards.
** convention: x = chainage - K16+876.000
*BOUNDARY
N_FLOOR_ANCHOR, 1, 3
*BOUNDARY
N_PORTAL_ANCHOR, 1, 3
*BOUNDARY
N_SUPPORT_SADDLE_ENDS, 1, 3
** INITIAL STRESS from independent sag formula H=wL^2/(8h), h=227.300 m
** H_floor_deck=7.953515e+06 N  sigma_floor=3.549611e+08 Pa
*INITIAL CONDITIONS, TYPE=STRESS
E_FLOOR_ROPE, 3.549611e+08
E_PORTAL_ROPE, 2.426295e+08
*STEP, NLGEOM
LC-DEAD-PRESTRESS
*STATIC
*DLOAD
E_TRUSS, GRAV, 9.806650, 0., 0., -1.
E_BEAM, GRAV, 9.806650, 0., 0., -1.
** extra floor-system dead beyond rope self-weight, downward
*CLOAD
1, 3, -1.484343e+03
2, 3, -1.484343e+03
3, 3, -1.484343e+03
4, 3, -1.484343e+03
5, 3, -1.484343e+03
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51854, 3, -1.411718e+03
*NODE FILE
U
*EL FILE
S
*END STEP
*STEP, NLGEOM
LC-PERSONNEL-UNIFORM
*STATIC
*DLOAD
E_TRUSS, GRAV, 9.806650, 0., 0., -1.
E_BEAM, GRAV, 9.806650, 0., 0., -1.
** personnel 1.5 kPa x 5.6 m; ASSUMP construction walkway 1.5 kPa on 5.60 m effective width
*CLOAD
1, 3, -1.569894e+04
2, 3, -1.569894e+04
3, 3, -1.569894e+04
4, 3, -1.569894e+04
5, 3, -1.569894e+04
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51854, 3, -1.493082e+04
*NODE FILE
U
*EL FILE
S
*END STEP
*STEP, NLGEOM
LC-WIND-Y
*STATIC
*DLOAD
E_TRUSS, GRAV, 9.806650, 0., 0., -1.
E_BEAM, GRAV, 9.806650, 0., 0., -1.
** ASSUMP construction wind 0.50 kN/m per deck, +Y
*CLOAD
1, 3, -1.484343e+03
2, 3, -1.484343e+03
3, 3, -1.484343e+03
4, 3, -1.484343e+03
5, 3, -1.484343e+03
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51854, 3, -1.411718e+03
*CLOAD
1, 2, 8.461069e+02
2, 2, 8.461069e+02
3, 2, 8.461069e+02
4, 2, 8.461069e+02
5, 2, 8.461069e+02
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51854, 2, 8.047086e+02
*NODE FILE
U
*EL FILE
S
*END STEP
** LC-FREQ after last static: linearization uses the last NLGEOM state.
** Dedicated dead+freq deck is written separately when run_pipeline asks.
*STEP
LC-FREQ
*FREQUENCY
20
*NODE FILE
U
*END STEP
