*HEADING
Original ordinary gantry 296/1168 loaded fixture
*NODE,NSET=ALL
1,2.63700850000e+03,-2.41200000000e+01,1.13820474028e+02
2,2.63700850000e+03,-2.38600000000e+01,1.13820474028e+02
3,2.63700850000e+03,-2.36000000000e+01,1.13820474028e+02
4,2.63700850000e+03,-2.33400000000e+01,1.13820474028e+02
5,2.63700850000e+03,-2.30800000000e+01,1.13820474028e+02
6,2.63700850000e+03,-2.28200000000e+01,1.13820474028e+02
7,2.63700850000e+03,-2.25600000000e+01,1.13820474028e+02
8,2.63700850000e+03,-2.23000000000e+01,1.13820474028e+02
9,2.63700850000e+03,-2.06000000000e+01,1.13820474028e+02
10,2.63700850000e+03,-2.03400000000e+01,1.13820474028e+02
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*MATERIAL,NAME=STEEL
*ELASTIC
2.06000000000e+11,0.31
*DENSITY
7850.0
*ELEMENT,TYPE=B32R,ELSET=B0
1,23,25,24
2,24,27,26
3,26,29,28
4,28,31,30
5,382,386,385
6,385,387,384
7,384,390,388
8,388,391,389
9,389,392,383
10,395,397,396
11,396,398,384
12,401,405,404
13,404,406,403
14,403,409,407
15,407,410,408
16,408,411,402
17,414,416,415
18,415,417,403
*BEAM SECTION,ELSET=B0,MATERIAL=STEEL,SECTION=BOX
1.60000000000e-01,1.60000000000e-01,4.00000000000e-03,4.00000000000e-03,4.00000000000e-03,4.00000000000e-03
1.00000000000e+00,0.00000000000e+00,0.00000000000e+00
*ELEMENT,TYPE=S8R,ELSET=S0
19,44,45,46,47,48,49,50,51
24,45,72,73,46,74,75,76,49
29,72,89,90,73,91,92,93,75
34,89,106,107,90,108,109,110,92
39,106,123,124,107,125,126,127,109
44,123,140,141,124,142,143,144,126
49,140,157,158,141,159,160,161,143
54,157,174,175,158,176,177,178,160
59,174,191,192,175,193,194,195,177
64,191,208,209,192,210,211,212,194
69,208,225,226,209,227,228,229,211
74,225,242,243,226,244,245,246,228
79,242,259,260,243,261,262,263,245
84,259,276,277,260,278,279,280,262
89,276,293,294,277,295,296,297,279
94,293,310,311,294,312,313,314,296
99,310,327,328,311,329,330,331,313
*SHELL SECTION,ELSET=S0,MATERIAL=STEEL
7.00000000000e-03
*ELEMENT,TYPE=S8R,ELSET=S1
20,52,53,46,47,54,55,50,56
21,47,46,57,58,50,59,60,61
22,62,63,45,44,64,65,48,66
23,44,45,67,68,48,69,70,71
25,53,77,73,46,78,79,76,55
26,46,73,80,57,76,81,82,59
27,63,83,72,45,84,85,74,65
28,45,72,86,67,74,87,88,69
30,77,94,90,73,95,96,93,79
31,73,90,97,80,93,98,99,81
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*SHELL SECTION,ELSET=S1,MATERIAL=STEEL
1.10000000000e-02
*ELEMENT,TYPE=SPRINGA,ELSET=C0
104,423,1
106,425,2
108,427,3
110,429,4
112,431,5
114,433,6
116,435,7
118,437,8
120,439,9
122,441,10
124,443,11
126,445,12
128,447,13
130,449,14
132,451,15
134,453,16
*SPRING,ELSET=C0,NONLINEAR
0.00000000000e+00,-1.19384098312e-01
0.00000000000e+00,-1.91962997658e-02
6.40875000000e+05,0.00000000000e+00
3.98567874742e+06,1.00187798546e-01
*ELEMENT,TYPE=SPRINGA,ELSET=C1
105,1,424
107,2,426
109,3,428
111,4,430
113,5,432
115,6,434
117,7,436
119,8,438
121,9,440
123,10,442
125,11,444
127,12,446
129,13,448
131,14,450
133,15,452
135,16,454
*SPRING,ELSET=C1,NONLINEAR
0.00000000000e+00,-9.51395210663e-02
0.00000000000e+00,-1.52975308323e-02
6.40856250000e+05,0.00000000000e+00
3.98565999740e+06,7.98419902340e-02
*ELEMENT,TYPE=SPRINGA,ELSET=C2
136,455,17
138,457,18
140,459,19
142,461,20
144,463,21
146,465,22
*SPRING,ELSET=C2,NONLINEAR
0.00000000000e+00,-2.07839113217e-01
0.00000000000e+00,-2.78138582666e-02
5.19303333333e+05,0.00000000000e+00
3.88049522853e+06,1.80025254950e-01
*ELEMENT,TYPE=SPRINGA,ELSET=C3
137,17,456
139,18,458
141,19,460
143,20,462
145,21,464
147,22,466
*SPRING,ELSET=C3,NONLINEAR
0.00000000000e+00,-2.07843671673e-01
0.00000000000e+00,-2.78111433786e-02
5.19231666667e+05,0.00000000000e+00
3.88042356186e+06,1.80032528294e-01
*ELEMENT,TYPE=MASS,ELSET=M0
148,418
149,419
*MASS,ELSET=M0
6.44383875130e+02
*ELSET,ELSET=STEELALL,GENERATE
1,103,1
*NSET,NSET=RB0
17
*RIGID BODY,NSET=RB0,REF NODE=32,ROT NODE=33
*NSET,NSET=RB1
18,418
*RIGID BODY,NSET=RB1,REF NODE=34,ROT NODE=35
*NSET,NSET=RB2
19
*RIGID BODY,NSET=RB2,REF NODE=36,ROT NODE=37
*NSET,NSET=RB3
20
*RIGID BODY,NSET=RB3,REF NODE=38,ROT NODE=39
*NSET,NSET=RB4
21,419
*RIGID BODY,NSET=RB4,REF NODE=40,ROT NODE=41
*NSET,NSET=RB5
22
*RIGID BODY,NSET=RB5,REF NODE=42,ROT NODE=43
*NSET,NSET=RB6
52,62,47,44,58,68,51
*RIGID BODY,NSET=RB6,REF NODE=344,ROT NODE=345
*NSET,NSET=RB7
332,338,328,327,335,341,330
*RIGID BODY,NSET=RB7,REF NODE=346,ROT NODE=347
*NSET,NSET=RB8
1
*RIGID BODY,NSET=RB8,REF NODE=349,ROT NODE=348
*NSET,NSET=RB9
2
*RIGID BODY,NSET=RB9,REF NODE=351,ROT NODE=350
*NSET,NSET=RB10
3
*RIGID BODY,NSET=RB10,REF NODE=353,ROT NODE=352
*NSET,NSET=RB11
4
*RIGID BODY,NSET=RB11,REF NODE=355,ROT NODE=354
*NSET,NSET=RB12
5
*RIGID BODY,NSET=RB12,REF NODE=357,ROT NODE=356
*NSET,NSET=RB13
6
*RIGID BODY,NSET=RB13,REF NODE=359,ROT NODE=358
*NSET,NSET=RB14
7
*RIGID BODY,NSET=RB14,REF NODE=361,ROT NODE=360
*NSET,NSET=RB15
8
*RIGID BODY,NSET=RB15,REF NODE=363,ROT NODE=362
*NSET,NSET=RB16
9
*RIGID BODY,NSET=RB16,REF NODE=365,ROT NODE=364
*NSET,NSET=RB17
10
*RIGID BODY,NSET=RB17,REF NODE=367,ROT NODE=366
*NSET,NSET=RB18
11
*RIGID BODY,NSET=RB18,REF NODE=369,ROT NODE=368
*NSET,NSET=RB19
12
*RIGID BODY,NSET=RB19,REF NODE=371,ROT NODE=370
*NSET,NSET=RB20
13
*RIGID BODY,NSET=RB20,REF NODE=373,ROT NODE=372
*NSET,NSET=RB21
14
*RIGID BODY,NSET=RB21,REF NODE=375,ROT NODE=374
*NSET,NSET=RB22
15
*RIGID BODY,NSET=RB22,REF NODE=377,ROT NODE=376
*NSET,NSET=RB23
16
*RIGID BODY,NSET=RB23,REF NODE=379,ROT NODE=378
*NSET,NSET=RB24
422
*RIGID BODY,NSET=RB24,REF NODE=420,ROT NODE=421
*EQUATION
4
32,1,1.00000000000e+00,23,1,1.16891517944e-01,25,1,-8.61128880392e-01
24,1,-2.55762637552e-01
4
33,1,1.00000000000e+00,23,4,1.16891517944e-01,25,4,-8.61128880392e-01
24,4,-2.55762637552e-01
4
32,2,1.00000000000e+00,23,2,1.16891517944e-01,25,2,-8.61128880392e-01
24,2,-2.55762637552e-01
4
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*BOUNDARY
423,1,1
423,2,2
423,3,3
424,1,1
424,2,2
424,3,3
425,1,1
425,2,2
425,3,3
426,1,1
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*NSET,NSET=OBS
1,2,3,4,5,6,7,8,9,10,11,12
13,14,15,16,17,18,19,20,21,22,23,24
25,26,27,28,29,30,31,32,33,34,35,36
37,38,39,40,41,42,43,44,45,46,47,48
49,50,51,52,53,54,55,56,57,58,59,60
61,62,63,64,65,66,67,68,69,70,71,72
73,74,75,76,77,78,79,80,81,82,83,84
85,86,87,88,89,90,91,92,93,94,95,96
97,98,99,100,101,102,103,104,105,106,107,108
109,110,111,112,113,114,115,116,117,118,119,120
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*STEP,NLGEOM,INC=100
*STATIC
1.,1.,1.e-8,1.
*DLOAD
STEELALL,GRAV,9.80600000000e+00,0.,0.,-1.
*CLOAD
418,3,-6.31882827956e+03
419,3,-6.31882827956e+03
*NODE PRINT,NSET=OBS
U,RF
*NODE FILE,OUTPUT=2D
U
*END STEP
