*HEADING
Independent taut-string prestress verification
*NODE,NSET=ALL
1,0,0,0
2,1,0,0
3,2,0,0
4,3,0,0
5,4,0,0
6,5,0,0
7,6,0,0
8,7,0,0
9,8,0,0
10,9,0,0
11,10,0,0
12,11,0,0
13,12,0,0
14,13,0,0
15,14,0,0
16,15,0,0
17,16,0,0
18,17,0,0
19,18,0,0
20,19,0,0
21,20,0,0
22,21,0,0
23,22,0,0
24,23,0,0
25,24,0,0
26,25,0,0
27,26,0,0
28,27,0,0
29,28,0,0
30,29,0,0
31,30,0,0
32,31,0,0
33,32,0,0
34,33,0,0
35,34,0,0
36,35,0,0
37,36,0,0
38,37,0,0
39,38,0,0
40,39,0,0
41,40,0,0
42,41,0,0
43,42,0,0
44,43,0,0
45,44,0,0
46,45,0,0
47,46,0,0
48,47,0,0
49,48,0,0
50,49,0,0
51,50,0,0
52,51,0,0
53,52,0,0
54,53,0,0
55,54,0,0
56,55,0,0
57,56,0,0
58,57,0,0
59,58,0,0
60,59,0,0
61,60,0,0
62,61,0,0
63,62,0,0
64,63,0,0
65,64,0,0
66,65,0,0
67,66,0,0
68,67,0,0
69,68,0,0
70,69,0,0
71,70,0,0
72,71,0,0
73,72,0,0
74,73,0,0
75,74,0,0
76,75,0,0
77,76,0,0
78,77,0,0
79,78,0,0
80,79,0,0
81,80,0,0
82,81,0,0
83,82,0,0
84,83,0,0
85,84,0,0
86,85,0,0
87,86,0,0
88,87,0,0
89,88,0,0
90,89,0,0
91,90,0,0
92,91,0,0
93,92,0,0
94,93,0,0
95,94,0,0
96,95,0,0
97,96,0,0
98,97,0,0
99,98,0,0
100,99,0,0
101,100,0,0
*ELEMENT,TYPE=SPRINGA,ELSET=CABLE
1,1,2
2,2,3
3,3,4
4,4,5
5,5,6
6,6,7
7,7,8
8,8,9
9,9,10
10,10,11
11,11,12
12,12,13
13,13,14
14,14,15
15,15,16
16,16,17
17,17,18
18,18,19
19,19,20
20,20,21
21,21,22
22,22,23
23,23,24
24,24,25
25,25,26
26,26,27
27,27,28
28,28,29
29,29,30
30,30,31
31,31,32
32,32,33
33,33,34
34,34,35
35,35,36
36,36,37
37,37,38
38,38,39
39,39,40
40,40,41
41,41,42
42,42,43
43,43,44
44,44,45
45,45,46
46,46,47
47,47,48
48,48,49
49,49,50
50,50,51
51,51,52
52,52,53
53,53,54
54,54,55
55,55,56
56,56,57
57,57,58
58,58,59
59,59,60
60,60,61
61,61,62
62,62,63
63,63,64
64,64,65
65,65,66
66,66,67
67,67,68
68,68,69
69,69,70
70,70,71
71,71,72
72,72,73
73,73,74
74,74,75
75,75,76
76,76,77
77,77,78
78,78,79
79,79,80
80,80,81
81,81,82
82,82,83
83,83,84
84,84,85
85,85,86
86,86,87
87,87,88
88,88,89
89,89,90
90,90,91
91,91,92
92,92,93
93,93,94
94,94,95
95,95,96
96,96,97
97,97,98
98,98,99
99,99,100
100,100,101
*SPRING,ELSET=CABLE,NONLINEAR

0.0,-1.001
0.0,-0.001
1000,0
1001000,1
*ELEMENT,TYPE=MASS,ELSET=INTERIOR
101,2
102,3
103,4
104,5
105,6
106,7
107,8
108,9
109,10
110,11
111,12
112,13
113,14
114,15
115,16
116,17
117,18
118,19
119,20
120,21
121,22
122,23
123,24
124,25
125,26
126,27
127,28
128,29
129,30
130,31
131,32
132,33
133,34
134,35
135,36
136,37
137,38
138,39
139,40
140,41
141,42
142,43
143,44
144,45
145,46
146,47
147,48
148,49
149,50
150,51
151,52
152,53
153,54
154,55
155,56
156,57
157,58
158,59
159,60
160,61
161,62
162,63
163,64
164,65
165,66
166,67
167,68
168,69
169,70
170,71
171,72
172,73
173,74
174,75
175,76
176,77
177,78
178,79
179,80
180,81
181,82
182,83
183,84
184,85
185,86
186,87
187,88
188,89
189,90
190,91
191,92
192,93
193,94
194,95
195,96
196,97
197,98
198,99
199,100
*MASS,ELSET=INTERIOR
2.4
*ELEMENT,TYPE=MASS,ELSET=ENDS
200,1
201,101
*MASS,ELSET=ENDS
1.2
*BOUNDARY
1,1,3
101,1,3
*STEP,NLGEOM
*STATIC
1,1
*NODE PRINT,NSET=ALL
U,RF
*END STEP
*STEP,PERTURBATION
*FREQUENCY
12,0,10
*NODE FILE
U
*END STEP
