! ============================================================================
! 独立审计：读取 V2.0 已保存的最终静力平衡数据库与静力结果，核验索是否全程受拉，
! 并核验新增材料 61～66 的梁构件在基态下是否存在压杆。
! 本输入只进入 /POST1、只写独立文本，不执行 SOLVE，不保存数据库，也不改正式模型。
! ============================================================================
/CLEAR,START
! 使用独立作业名，确保审计日志及临时文件不会覆盖 attachment23_v2 正式证据。
/FILNAME,audit_prestress_state_20260713
! 恢复正式基线在非线性静力最终收敛后保存的数据库；该数据库本身保持只读。
RESUME,attachment23_v2_equilibrium,db
! 显式指定正式基线静力结果文件，避免误读后来覆盖的 RSTP 模态结果文件。
/POST1
FILE,attachment23_v2,rst
! 读取静力结果文件最后一个结果集；正式日志表明其为 TIME=1、LOAD STEP=1、SUBSTEP=4。
SET,LAST
ALLSEL,ALL

! ----------------------------------------------------------------------------
! LINK180 审计：TYPE=4 包含 73,688 根实体承重/门架索和 4 根下拉等效索。
! SMISC,1 是 LINK180 轴力；正值代表受拉，非正值将推翻“全索受拉”的前提。
! ----------------------------------------------------------------------------
ESEL,S,TYPE,,4
ETABLE,AXIAL_FORCE,SMISC,1
/OUTPUT,audit_v2_static_link180_force_20260713,txt
PRETAB,AXIAL_FORCE
/OUTPUT
ETABLE,ERAS
ALLSEL,ALL

! ----------------------------------------------------------------------------
! BEAM188 新增有限构件审计：材料 61～66 分别对应门架与横向通道六个工程分组。
! SMISC,1 作为梁端轴力筛查量；负值表示构件受压。该结果只用于判断几何刚度可能性，
! 不能替代完整梁内力验算，也不能据此把材料倍率解释为真实钢材参数。
! ----------------------------------------------------------------------------
*DO,AUDIT_MAT,61,66,1
  ALLSEL,ALL
  ESEL,S,MAT,,AUDIT_MAT
  ETABLE,BEAM_AXIAL_FORCE,SMISC,1
  /OUTPUT,audit_v2_static_beam_mat_%AUDIT_MAT%_force_20260713,txt
  PRETAB,BEAM_AXIAL_FORCE
  /OUTPUT
  ETABLE,ERAS
*ENDDO
ALLSEL,ALL

! 不保存数据库，保证本审计没有回写正式静力状态、材料、约束或结果集。
FINISH
/EXIT,NOSAVE
