*HEADING
MCT from-zero static migrate: 猫道 - 门架索合建模型2.mct
** P6 工况6恒+施工+温34 NLGEOM daughter of 974211b2. step2 keeps GRAV+二期; *CLOAD total=二期+['施工荷载']; temp=-34.0. Not a new main. Not 00fc277e replace-card.
source sha256=0d18e3f7b009e0306fb4b9f3051b4a16d05fa24d9e966774e809b8942a4f22e1 bytes=448673
units: CalculiX N, mm; MCT was KN, MM. Not homemade STEP.
IC format ccx_2.21_s7.76_element_ip_six_pk2_global. P0: statics / cable force / prestress.
*NODE
1, 852105, 0, 28152
2, 874000, 0, 54653.835
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*ELEMENT, TYPE=T3D2, ELSET=E_CABLE
1, 1, 2
2, 2, 3
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*ELEMENT, TYPE=B31, ELSET=E_FRAME
1395, 1008, 16
1396, 1013, 29
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*ELSET, ELSET=E_SEC1
1, 2, 3, 4, 5, 6
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*ELSET, ELSET=E_SEC2
1001, 1002, 1003, 1004, 1005, 1006
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*ELSET, ELSET=E_SEC3
1395, 1396, 1397, 1398, 1399, 1400
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*MATERIAL, NAME=MAT1
*ELASTIC
120000, 0.3
*EXPANSION
1.2e-05
*DENSITY
1.26484805e-08
*MATERIAL, NAME=MAT2
*ELASTIC
120000, 0.3
*EXPANSION
1.2e-05
*DENSITY
8.59881705e-09
*MATERIAL, NAME=MAT3
*ELASTIC
206000, 0.31
*EXPANSION
1.2e-05
*DENSITY
1.01978381e-17
*SOLID SECTION, ELSET=E_SEC1, MATERIAL=MAT1
22298.692
*SOLID SECTION, ELSET=E_SEC2, MATERIAL=MAT2
8402.9797
*BEAM SECTION, ELSET=E_SEC3, MATERIAL=MAT3, SECTION=RECT
98.954535, 98.954535
1, 1, 1
*INITIAL CONDITIONS, TYPE=STRESS
** ccx_2.21_s7.76_element_ip_six_pk2_global; sigma = F_N / A_mm2 from MCT INI-EFORCE mean, else INIFORCE
1, 1, 2.853700e+02, 0.000000e+00, 4.180905e+02, 0.000000e+00, 3.454135e+02, 0.000000e+00
1, 2, 2.853700e+02, 0.000000e+00, 4.180905e+02, 0.000000e+00, 3.454135e+02, 0.000000e+00
1, 3, 2.853700e+02, 0.000000e+00, 4.180905e+02, 0.000000e+00, 3.454135e+02, 0.000000e+00
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1394, 8, 3.577523e+02, 0.000000e+00, 2.640309e+01, 0.000000e+00, -9.718932e+01, -0.000000e+00
*BOUNDARY
1, 1, 1
1, 2, 2
1, 3, 3
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1393, 3, 3
** MCT Y≈0 2-D equivalent: UY=0 on all nodes (migrate plane, not homemade).
2, 2, 2
4, 2, 2
5, 2, 2
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1394, 2, 2
*NSET, NSET=N_THERM, GENERATE
1, 80000
*INITIAL CONDITIONS, TYPE=TEMPERATURE
N_THERM, 0.
*STEP, NLGEOM
*STATIC
*DLOAD
E_CABLE, GRAV, 9806, 0.0, 0.0, -1.0
E_FRAME, GRAV, 9806, 0.0, 0.0, -1.0
*CLOAD
1, 3, -0.01
2, 3, -0.01
3, 3, -0.01
4, 3, -0.01
5, 3, -0.01
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1395, 3, -0.001
*NSET, NSET=N_MCT
1, 2, 3, 4, 5, 6
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*TEMPERATURE
N_THERM, 0.
*NODE FILE, NSET=N_MCT
U
*EL FILE
S, E
*NODE PRINT, NSET=N_MCT
U
*EL PRINT, ELSET=E_CABLE
S
*END STEP
** P6 工况6恒+施工+温34 NLGEOM daughter of 974211b2. step2 keeps GRAV+二期; *CLOAD total=二期+['施工荷载']; temp=-34.0. Not a new main. Not 00fc277e replace-card.
*STEP, NLGEOM
*STATIC
1., 1., 1e-6, 1.
*DLOAD
E_CABLE, GRAV, 9806, 0.0, 0.0, -1.0
E_FRAME, GRAV, 9806, 0.0, 0.0, -1.0
*CLOAD
1, 3, -8955.07
2, 3, -9349.48
3, 3, -724.758
4, 3, -1285.37
5, 3, -1237.81
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1395, 3, -5459.141
*TEMPERATURE
N_THERM, 0.
N_MCT, -34
*NODE FILE, NSET=N_MCT, FREQUENCY=99
U
*EL FILE, FREQUENCY=99
S, E
*NODE PRINT, NSET=N_MCT, FREQUENCY=99
U
*EL PRINT, ELSET=E_CABLE, FREQUENCY=99
S
*END STEP
