*HEADING
DYN_ISO_MAIN_SLIDE_STATIC daughter of 974211b2; not a new main; not 00fc277e replace-card
parent loads = stacked P1 / P2-step1 恒载 (GRAV + 二期, no construction, no wind, no temperature)
units: CalculiX N, mm, s; density t/mm3; g=9806 mm/s2
IC format ccx_2.21_s7.76_element_ip_six_pk2_global
imported_TARGET_FREQ=false
not_a_scientific_claim=true
bc_family=UYFREE; omitted 010 migrate-plane UY=0; 111 and 011 retained
SLIDE_STATIC change K; extra BC in model definition; geom MAIN_SLIDE
*NODE
1, 852105, 0, 28152
2, 874000, 0, 54653.835
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*ELEMENT, TYPE=T3D2, ELSET=E_CABLE
1, 1, 2
2, 2, 3
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*ELEMENT, TYPE=B31, ELSET=E_FRAME
1395, 1008, 16
1396, 1013, 29
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*ELSET, ELSET=E_SEC1
1, 2, 3, 4, 5, 6
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*ELSET, ELSET=E_SEC2
1001, 1002, 1003, 1004, 1005, 1006
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*ELSET, ELSET=E_SEC3
1395, 1396, 1397, 1398, 1399, 1400
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*MATERIAL, NAME=MAT1
*ELASTIC
120000, 0.3
*DENSITY
1.26484805e-08
*MATERIAL, NAME=MAT2
*ELASTIC
120000, 0.3
*DENSITY
8.59881705e-09
*MATERIAL, NAME=MAT3
*ELASTIC
206000, 0.31
*DENSITY
1.01978381e-17
*SOLID SECTION, ELSET=E_SEC1, MATERIAL=MAT1
22298.692
*SOLID SECTION, ELSET=E_SEC2, MATERIAL=MAT2
8402.9797
*BEAM SECTION, ELSET=E_SEC3, MATERIAL=MAT3, SECTION=RECT
98.954535, 98.954535
1, 1, 1
*INITIAL CONDITIONS, TYPE=STRESS
** ccx_2.21_s7.76_element_ip_six_pk2_global; sigma = F_N / A_mm2 from MCT INI-EFORCE mean, else INIFORCE
1, 1, 2.853700e+02, 0.000000e+00, 4.180905e+02, 0.000000e+00, 3.454135e+02, 0.000000e+00
1, 2, 2.853700e+02, 0.000000e+00, 4.180905e+02, 0.000000e+00, 3.454135e+02, 0.000000e+00
1, 3, 2.853700e+02, 0.000000e+00, 4.180905e+02, 0.000000e+00, 3.454135e+02, 0.000000e+00
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1394, 8, 3.577523e+02, 0.000000e+00, 2.640309e+01, 0.000000e+00, -9.718932e+01, -0.000000e+00
*BOUNDARY
1, 1, 1
1, 2, 2
1, 3, 3
154, 1, 1
154, 2, 2
154, 3, 3
450, 1, 1
450, 2, 2
450, 3, 3
728, 1, 1
728, 2, 2
728, 3, 3
729, 1, 1
729, 2, 2
729, 3, 3
730, 1, 1
730, 2, 2
730, 3, 3
1001, 1, 1
1001, 2, 2
1001, 3, 3
1066, 1, 1
1066, 2, 2
1066, 3, 3
1280, 1, 1
1280, 2, 2
1280, 3, 3
1395, 1, 1
1395, 2, 2
1395, 3, 3
3, 2, 2
3, 3, 3
6, 2, 2
6, 3, 3
157, 2, 2
157, 3, 3
447, 2, 2
447, 3, 3
608, 2, 2
608, 3, 3
723, 2, 2
723, 3, 3
726, 2, 2
726, 3, 3
1003, 2, 2
1003, 3, 3
1063, 2, 2
1063, 3, 3
1283, 2, 2
1283, 3, 3
1347, 2, 2
1347, 3, 3
1393, 2, 2
1393, 3, 3
*BOUNDARY
1, 1, 3
2, 1, 3
3, 1, 3
4, 1, 3
5, 1, 3
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1395, 1, 3
*STEP, NLGEOM
*STATIC
*DLOAD
E_CABLE, GRAV, 9806, 0.0, 0.0, -1.0
E_FRAME, GRAV, 9806, 0.0, 0.0, -1.0
*CLOAD
1, 3, -0.01
2, 3, -0.01
3, 3, -0.01
4, 3, -0.01
5, 3, -0.01
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1395, 3, -0.001
*NSET, NSET=N_MCT
1, 2, 3, 4, 5, 6
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*NODE FILE, NSET=N_MCT
U
*EL FILE
S, E
*NODE PRINT, NSET=N_MCT
U
*END STEP
*STEP, PERTURBATION
*FREQUENCY
40
*NODE FILE, NSET=N_MCT
U
*NODE FILE
U
*END STEP
