! C10 单 TYPE72 约 0.1 rad 受矩有限转动解析测试；本文件由 prepare 生成但不自动执行。
! slave 只连接两根极软 LINK180 与一个仅平移 MASS21，禁止任何物理转角消费者。
/CLEAR,START ! 清空未来独立微模型会话。
/FILNAME,c10sr_rx ! 设置当前案例唯一 ASCII 作业名。
/PREP7 ! 进入前处理器定义单刚臂有限转动模型。
ET,2,LINK180 ! 定义仅三平移自由度的极软测试索。
MP,EX,2,1 ! 设置极软索弹性模量为 1 N/mm2。
MP,PRXY,2,0.3 ! 设置测试索泊松比为 0.3。
SECTYPE,2,LINK ! 定义极软测试索截面。
SECDATA,0.000001 ! 设置 1e-6 mm2 极小面积。
ET,3,MASS21 ! 定义仅三平移集中质量。
KEYOPT,3,3,2 ! MASS21 只激活 UX、UY、UZ。
R,3,0.001 ! 设置 0.001 tonne 测试质量。
ET,4,COMBIN14 ! 定义 master 到地基的单轴转动弹簧。
KEYOPT,4,2,4 ! 将 COMBIN14 激活在目标转轴 ROTX。
R,4,10 ! 设置目标轴转动刚度为 10.0 N·mm/rad。
ET,72,MPC184 ! 定义单个偏置 rigid beam。
KEYOPT,72,1,1 ! 选择六自由度 rigid-beam 公式。
KEYOPT,72,2,0 ! 使用 direct elimination。
KEYOPT,72,5,0 ! 保留几何应力刚度。
CSYS,0 ! 使用全局笛卡尔坐标。
N,1,0,0,0 ! 定义受矩且目标转轴自由的 master。
N,2,800,-600,500 ! 定义纯平移索 slave。
N,3,-200,-600,500 ! 定义左侧极软索固定端。
N,4,1800,-600,500 ! 定义右侧极软索固定端。
N,5,0,0,0 ! 定义与 master 共点的转动弹簧地基节点。
TYPE,2 ! 选择极软 LINK180。
MAT,2 ! 选择极软材料。
SECNUM,2 ! 选择 1e-6 mm2 截面。
EN,20,3,2 ! 建立左侧极软 LINK180。
EN,21,2,4 ! 建立右侧极软 LINK180。
TYPE,3 ! 选择仅平移 MASS21。
REAL,3 ! 选择 0.001 tonne 实常数。
EN,30,2 ! 在 slave 建立仅平移质量。
TYPE,72 ! 选择单 TYPE72。
EN,1,1,2 ! 直接连接 master 与原 slave。
TYPE,4 ! 选择目标轴 COMBIN14 转动弹簧。
REAL,4 ! 选择 10 N·mm/rad 转动刚度实常数。
EN,40,1,5 ! 建立 master 到共点地基的目标轴转动弹簧。
D,1,UX,0 ! 固定 master X 平移。
D,1,UY,0 ! 固定 master Y 平移。
D,1,UZ,0 ! 固定 master Z 平移。
D,1,ROTY,0 ! 固定非目标 master 转角 ROTY。
D,1,ROTZ,0 ! 固定非目标 master 转角 ROTZ。
D,3,ALL,0 ! 固定左侧极软索远端。
D,4,ALL,0 ! 固定右侧极软索远端。
D,5,ALL,0 ! 固定转动弹簧地基端全部有效自由度。
F,1,MX,1 ! 在 master 施加 1 N·mm 目标轴力矩。
FINISH ! 完成有限转动模型前处理。
/SOLU ! 进入静力求解器。
ANTYPE,STATIC ! 选择静力分析。
NLGEOM,ON ! 启用大转动运动学。
NROPT,FULL ! 每次迭代更新完整切线。
AUTOTS,OFF ! 关闭自动子步。
NSUBST,20,20,20 ! 将 0.1 rad 分成二十个固定子步。
CNVTOL,F,,0.005,2,1.0 ! 将 VALUE 留空，固定 0.5% 力容限、L2 范数和 1 N 最小参考值。
CNVTOL,M,,0.005,2,1.0 ! 将 VALUE 留空，固定 0.5% 力矩容限、L2 范数和 1 N·mm 最小参考值。
CNVTOL,U,,0.05,0 ! 将 VALUE 留空，固定 5% 平移修正容限和逐自由度无穷范数。
CNVTOL,ROT,,0.05,0 ! 将 VALUE 留空，固定 5% 转角修正容限和逐自由度无穷范数。
OUTRES,ALL,ALL ! 保存全部二十个子步结果。
SOLVE ! 执行当前有限转动测试；prepare 本身不调用本文件。
FINISH ! 结束求解阶段。
/POST1 ! 进入结果后处理器。
SET,LAST ! 读取接近 0.1 rad 的受矩终态结果。
*GET,C10_UMX,NODE,1,U,X ! 读取 master X 位移。
*GET,C10_UMY,NODE,1,U,Y ! 读取 master Y 位移。
*GET,C10_UMZ,NODE,1,U,Z ! 读取 master Z 位移。
*GET,C10_RMX,NODE,1,ROT,X ! 读取 master 绕 X 实际转角。
*GET,C10_RMY,NODE,1,ROT,Y ! 读取 master 绕 Y 实际转角。
*GET,C10_RMZ,NODE,1,ROT,Z ! 读取 master 绕 Z 实际转角。
*GET,C10_USX,NODE,2,U,X ! 读取 slave X 位移。
*GET,C10_USY,NODE,2,U,Y ! 读取 slave Y 位移。
*GET,C10_USZ,NODE,2,U,Z ! 读取 slave Z 位移。
*GET,C10_RSX,NODE,2,ROT,X ! 读取 solver-only slave 绕 X 代数转角。
*GET,C10_RSY,NODE,2,ROT,Y ! 读取 solver-only slave 绕 Y 代数转角。
*GET,C10_RSZ,NODE,2,ROT,Z ! 读取 solver-only slave 绕 Z 代数转角。
/OUTPUT,c10sr_rx_results,txt ! 打开当前有限转动机器结果文件。
*VWRITE,C10_UMX,C10_UMY,C10_UMZ,C10_RMX,C10_RMY,C10_RMZ ! 输出 master 六分量运动。
('MASTER_U=',3(E24.16,','),'MASTER_ROT=',3(E24.16,','))
*VWRITE,C10_USX,C10_USY,C10_USZ,C10_RSX,C10_RSY,C10_RSZ ! 输出 slave 六分量代数运动。
('SLAVE_U=',3(E24.16,','),'SLAVE_ROT=',3(E24.16,','))
/OUTPUT ! 恢复 MAPDL 主输出。
FINISH ! 完成单刚臂有限转动后处理。
/EXIT,NOSAVE ! 退出且不保留微模型数据库。
