! 本输入从复制的 LS2 已接受子步 2 重启，仅捕获下一最小增量的 Newton-Raphson 残差，不追求静力端点。
/BATCH
! 固定新运行唯一 jobname，确保重启读写全部落在复制目录而非来源运行。
/FILNAME,cw_C10rnr_0802023318096
! 使用纯 ASCII 标题标识本次为诊断残差采集。
/TITLE,C10 COPIED RESTART NRRE CAPTURE DIAGNOSTIC ONLY
! 进入求解处理器以调用同版本多帧重启。
/SOLU
! 从 R002 对应的载荷步 2、已接受子步 2 继续；来源帧已由 FILE_SUMMARY 独立确认。
ANTYPE,,REST,2,2,CONTINUE
! 为后续平衡迭代保存最多五十个 Newton-Raphson 节点力与力矩残差文件。
NLDIAG,NRRE,ON,50
! 把当前子步最大平衡迭代数限制为十二次，足以覆盖已观察到的残差振荡初段且阻止继续整条迁移。
NEQIT,12
! 当累计迭代数超过一百零五次时原生终止；R002 已冻结累计九十三次，因此该门与十二次子步门形成双保险。
NCNV,1,,105
! 继续求解下一最小迁移增量；预期诊断终止，不构成收敛端点。
SOLVE
! 正常情况下不会到达此行；若意外提前收敛，则显式离开求解处理器。
FINISH
! 即便意外到达输入末尾也不保存数据库为工程端点。
/EXIT,NOSAVE
