! ============================================================================
! D10_DOWNPULL：用下耳板刚体运动学替换 12 组非共点 CP。
! 图纸 MD3-28 / 复核 4.3.1：4 组 80 t 滑车，每组 8 根钢丝绳，上下耳板传力。
! MCT 等效 4 根 LINK180（单元 400000-400003、截面 33、INISTATE 应力）保持不变。
! 物理变更只有接口：删除 CP 60000-60011，改为以滑车合力点为 master 的
! CERIG,UXYZ 下耳板。16 根底索随耳板平动+转动，允许截面滚转（ROTX），
! 不再把 5340 mm 宽度上的 UX/UY/UZ 锁成同一平动（ANSYS 非共点 CP 人工力矩）。
! 合力点补 TYPE74 MASS21 六自由度微量质量，使 CERIG master 具备转动自由度。
! 单位 N, mm, tonne, s；坐标 X 顺桥、Y 横桥、Z 竖向。
! ============================================================================
/PREP7
ALLSEL,ALL
CPDELE,60000,60011,1
ET,74,MASS21
KEYOPT,74,3,0
R,74001,1.0E-12,1.0E-12,1.0E-12,1.0E-12,1.0E-12,1.0E-12
TYPE,74
REAL,74001
EN,400010,90001
EN,400011,90003
EN,400012,90005
EN,400013,90007
! CW1 north lower ear plate, master 90001 at (722209,21450,334645)
CERIG,90001,160,UXYZ
CERIG,90001,888,UXYZ
CERIG,90001,1616,UXYZ
CERIG,90001,2344,UXYZ
CERIG,90001,3072,UXYZ
CERIG,90001,3800,UXYZ
CERIG,90001,4528,UXYZ
CERIG,90001,5256,UXYZ
CERIG,90001,5984,UXYZ
CERIG,90001,6712,UXYZ
CERIG,90001,7440,UXYZ
CERIG,90001,8168,UXYZ
CERIG,90001,8896,UXYZ
CERIG,90001,9624,UXYZ
CERIG,90001,10352,UXYZ
CERIG,90001,11080,UXYZ
! CW2 north lower ear plate, master 90003 at (722209,-21450,334645)
CERIG,90003,14178,UXYZ
CERIG,90003,14906,UXYZ
CERIG,90003,15634,UXYZ
CERIG,90003,16362,UXYZ
CERIG,90003,17090,UXYZ
CERIG,90003,17818,UXYZ
CERIG,90003,18546,UXYZ
CERIG,90003,19274,UXYZ
CERIG,90003,20002,UXYZ
CERIG,90003,20730,UXYZ
CERIG,90003,21458,UXYZ
CERIG,90003,22186,UXYZ
CERIG,90003,22914,UXYZ
CERIG,90003,23642,UXYZ
CERIG,90003,24370,UXYZ
CERIG,90003,25098,UXYZ
! CW1 south lower ear plate, master 90005 at (2987609,21450,334537)
CERIG,90005,444,UXYZ
CERIG,90005,1172,UXYZ
CERIG,90005,1900,UXYZ
CERIG,90005,2628,UXYZ
CERIG,90005,3356,UXYZ
CERIG,90005,4084,UXYZ
CERIG,90005,4812,UXYZ
CERIG,90005,5540,UXYZ
CERIG,90005,6268,UXYZ
CERIG,90005,6996,UXYZ
CERIG,90005,7724,UXYZ
CERIG,90005,8452,UXYZ
CERIG,90005,9180,UXYZ
CERIG,90005,9908,UXYZ
CERIG,90005,10636,UXYZ
CERIG,90005,11364,UXYZ
! CW2 south lower ear plate, master 90007 at (2987609,-21450,334537)
CERIG,90007,14462,UXYZ
CERIG,90007,15190,UXYZ
CERIG,90007,15918,UXYZ
CERIG,90007,16646,UXYZ
CERIG,90007,17374,UXYZ
CERIG,90007,18102,UXYZ
CERIG,90007,18830,UXYZ
CERIG,90007,19558,UXYZ
CERIG,90007,20286,UXYZ
CERIG,90007,21014,UXYZ
CERIG,90007,21742,UXYZ
CERIG,90007,22470,UXYZ
CERIG,90007,23198,UXYZ
CERIG,90007,23926,UXYZ
CERIG,90007,24654,UXYZ
CERIG,90007,25382,UXYZ
ALLSEL,ALL
FINISH
